units           real
neigh_modify    delay 0 every 1 check yes
atom_style      full
bond_style      harmonic
angle_style     harmonic
pair_style      lj/cut/coul/long 10.0
pair_modify     mix arithmetic
kspace_style    pppm 1e-4
special_bonds   amber

atom_modify	sort 0 0

read_data       lammps.data

timestep        1.0

dump            1 all custom 1 dump.lammpstrj id element xu yu zu
dump            2 all custom 1 dump.force id element fx fy fz
dump            3 all xyz 1 dump.xyz
dump_modify     1 element O H
dump_modify     2 element O H

thermo_style    multi
thermo          1

# NVE
fix		1 all nve
# NPT
#fix             1 all npt temp 1.0 1.0 0.1 iso 1.0 1.0 1.0

fix             2 all mdi/qm virial yes

thermo_style    custom step temp pe etotal press vol
thermo          1

mdi             plugin qemdi mdi "-role ENGINE -name LMP2 -method LINK" &
                extra "--in qe.in" &
                command "run 5"
